OpenVSP model (file version 5), 1 components.
Geometry view with OpenVSP parameter names; values to 6 digits, angles in degrees, lengths in the model's unit.
Overall bounding box: X_Min=0 X_Len=22.0071 Y_Min=-2.26642 Y_Len=4.53284 Z_Min=-1.48272 Z_Len=2.96544

Fuselage "FuselageGeom"
  location (X Y Z) 0 0 0, rotation 0 0 0
  bounding box size 22.0071 4.53284 2.96544
  Design: Length=22.0071
  cross sections:
    n  XLocPercent  YLocPercent  ZLocPercent  shape
    0  0            0            0            ellipse Ellipse_Height=0.6 Ellipse_Width=0.6
    1  0.25         0            0            rounded rectangle RoundRectXSec_Radius=0.2 RoundedRect_Height=1.9239 RoundedRect_Width=4.53284
    2  0.5          0            0            rounded rectangle RoundRectXSec_Radius=0.2 RoundedRect_Height=2.84099 RoundedRect_Width=2.39775
    3  0.75         0            0            rounded rectangle RoundRectXSec_Radius=0.2 RoundedRect_Height=2.96544 RoundedRect_Width=1.86768
    4  1            0            0            ellipse Ellipse_Height=0.3 Ellipse_Width=0.3
