OpenVSP model (file version 5), 9 components.
Geometry view with OpenVSP parameter names; values to 6 digits, angles in degrees, lengths in the model's unit.
Overall bounding box: X_Min=0 X_Len=20 Y_Min=-1.25 Y_Len=2.5 Z_Min=-1.5 Z_Len=3

Fuselage "FuselageGeom"
  location (X Y Z) 0 0 0, rotation 0 0 0
  bounding box size 20 2.5 3
  Design: Length=20
  cross sections:
    n  XLocPercent  YLocPercent  ZLocPercent  shape
    0  0            0            0            point
    1  0.25         0            0            ellipse Ellipse_Height=3 Ellipse_Width=2.5
    2  0.5          0            0            as above
    3  0.75         0            0            as above
    4  1            0            0            point

Box "Volume_2"
  location (X Y Z) 1.1 0.1 0, rotation 0 0 0
  bounding box size 0.3 0.3 0.3
  Design: Height=0.3 Length=0.3 SquareFlag=0 Width=0.3
  custom script Box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

Box "Volume_3"
  location (X Y Z) 1.8 -0.1 0, rotation 0 0 0
  bounding box size 0.5 0.4 0.4
  Design: Height=0.4 Length=0.5 SquareFlag=0 Width=0.4
  custom script Box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

Box "Volume_4"
  location (X Y Z) 2.5 0 0.1, rotation 0 0 0
  bounding box size 0.35 0.35 0.35
  Design: Height=0.35 Length=0.35 SquareFlag=0 Width=0.35
  custom script Box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

Box "Volume_5"
  location (X Y Z) 3.05 0.12 -0.05, rotation 0 0 0
  bounding box size 0.45 0.4 0.3
  Design: Height=0.3 Length=0.45 SquareFlag=0 Width=0.4
  custom script Box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

Box "Volume_6"
  location (X Y Z) 3.6 -0.2 0.05, rotation 0 0 0
  bounding box size 0.3 0.3 0.3
  Design: Height=0.3 Length=0.3 SquareFlag=0 Width=0.3
  custom script Box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

Box "Volume_7"
  location (X Y Z) 4.2 0 0, rotation 0 0 0
  bounding box size 0.4 0.4 0.4
  Design: Height=0.4 Length=0.4 SquareFlag=0 Width=0.4
  custom script Box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

Box "Volume_8"
  location (X Y Z) 4.8 0.15 -0.1, rotation 0 0 0
  bounding box size 0.3 0.3 0.3
  Design: Height=0.3 Length=0.3 SquareFlag=0 Width=0.3
  custom script Box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

Box "Volume_10"
  location (X Y Z) 5.95 0 0, rotation 0 0 0
  bounding box size 0.6 0.5 0.45
  Design: Height=0.45 Length=0.6 SquareFlag=0 Width=0.5
  custom script Box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
