OpenVSP model (file version 5), 6 components.
Geometry view with OpenVSP parameter names; values to 6 digits, angles in degrees, lengths in the model's unit.
Overall bounding box: X_Min=0 X_Len=100 Y_Min=-4.42737 Y_Len=8.85473 Z_Min=-4.42737 Z_Len=8.85473

Fuselage "FuselageGeom"
  location (X Y Z) 0 0 0, rotation 0 0 0
  bounding box size 100 8.85473 8.85473
  Design: Length=100
  cross sections:
    n  XLocPercent  YLocPercent  ZLocPercent  shape
    0  0            0            0            point
    1  0.25         0            0            ellipse Ellipse_Height=3 Ellipse_Width=2.5
    2  0.5          0            0            as above
    3  0.75         0            0            as above
    4  1            0            0            point

Box "Volume_6"
  location (X Y Z) 3.6 -0.2 0.05, rotation 0 0 0
  bounding box size 0.3 0.3 0.3
  Design: Height=0.3 Length=0.3 SquareFlag=0 Width=0.3
  custom script Box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

Box "Volume_7"
  location (X Y Z) 4.2 0 0, rotation 0 0 0
  bounding box size 0.4 0.4 0.4
  Design: Height=0.4 Length=0.4 SquareFlag=0 Width=0.4
  custom script Box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

Box "Volume_8"
  location (X Y Z) 4.8 0.15 -0.1, rotation 0 0 0
  bounding box size 0.3 0.3 0.3
  Design: Height=0.3 Length=0.3 SquareFlag=0 Width=0.3
  custom script Box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

Box "Volume_9"
  location (X Y Z) 19 -0.12 0.08, rotation 0 0 0
  bounding box size 0.5 0.45 0.4
  Design: Height=0.4 Length=0.5 SquareFlag=0 Width=0.45
  custom script Box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

Box "Volume_10"
  location (X Y Z) 5.95 0 0, rotation 0 0 0
  bounding box size 0.6 0.5 0.45
  Design: Height=0.45 Length=0.6 SquareFlag=0 Width=0.5
  custom script Box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
